from __future__ import absolute_import, division, print_function
import Sofa
import pdoc

import argparse
import codecs
import datetime
import imp
import os
import os.path as path
import pkgutil
import re
import subprocess
import sys
import tempfile
import pdoc

def quick_desc(imp, name, ispkg):
    if not hasattr(imp, 'path'):
        # See issue #7.
        return ''

    if ispkg:
        fp = path.join(imp.path, name, '__init__.py')
    else:
        fp = path.join(imp.path, '%s.py' % name)
    if os.path.isfile(fp):
        with codecs.open(fp, 'r', 'utf-8') as f:
            quotes = None
            doco = []
            for i, line in enumerate(f):
                if i == 0:
                    if len(line) >= 3 and line[0:3] in ("'''", '"""'):
                        quotes = line[0:3]
                        line = line[3:]
                    else:
                        break
                line = line.rstrip()
                if line.endswith(quotes):
                    doco.append(line[0:-3])
                    break
                else:
                    doco.append(line)
            desc = '\n'.join(doco)
            if len(desc) > 200:
                desc = desc[0:200] + '...'
            return desc
    return ''


def _eprint(*args, **kwargs):
    kwargs['file'] = sys.stderr
    print(*args, **kwargs)


def last_modified(fp):
    try:
        return datetime.datetime.fromtimestamp(os.stat(fp).st_mtime)
    except:
        return datetime.datetime.min

def module_file(m):
    mbase = path.join("", *m.name.split('.'))
    if m.is_package():
        return path.join(mbase, pdoc.html_package_name)
    else:
        return '%s%s' % (mbase, pdoc.html_module_suffix)


def html_out(m, html=True):
    f = module_file(m)
    if not html:
        f = module_file(m).replace(".html", ".md")
    dirpath = path.dirname(f)
    if not os.access(dirpath, os.R_OK):
        os.makedirs(dirpath)
    try:
        with codecs.open(f, 'w+', 'utf-8') as w:
            if not html:
                out = m.text()
            else:
                out = m.html(external_links=False,
                             link_prefix="",
                             http_server=False,
                             source=True)
            print(out, file=w)
    except Exception:
        try:
            os.unlink(f)
        except:
            pass
        raise
    for submodule in m.submodules():
        html_out(submodule, html)


def createScene(node):
    module = pdoc.import_module("stlib")
    module = pdoc.Module(module, allsubmodules=True)
    html_out(module, True)
