# -*- coding: utf-8 -*-
from stlib.visuals import VisualModel


def RigidObject(node, name="RigidObject",
                surfaceMeshFileName=None,
                translation=[0., 0., 0.],
                rotation=[0., 0., 0.],
                uniformScale=1.,
                totalMass=1.,
                volume=1.,
                inertiaMatrix=[1., 0., 0., 0., 1., 0., 0., 0., 1.],
                color=[1., 1., 0.],
                isAStaticObject=False):
    """Creates and adds rigid body from a surface mesh.

    Args:
        surfaceMeshFileName (str):  The path or filename pointing to surface mesh file.

        totalMass (float):   The mass is distributed according to the geometry of the object.

        color (vec3f):  The default color used for the rendering of the object.

        translation (vec3f):   Apply a 3D translation to the object.

        rotation (vec3f):   Apply a 3D rotation to the object in Euler angles.

        uniformScale (vec3f):   Apply a uniform scaling to the object.

        isAStaticObject (bool): The object does not move in the scene (e.g. floor, wall) but react to collision.

    Structure:
            .. sourcecode:: qml

                Node : {
                    name : "rigidobject"
                    MechanicalObject,
                    UniformMass,
                    UncoupledConstraintCorrection,
                    *EulerImplicit,
                    *SparseLDLSolver,

                    Node : {
                        name : "collision",
                        Mesh,
                        MechanicalObject,
                        Triangle,
                        Line,
                        Point,
                        RigidMapping
                    }
                    Node : {
                       name : "visual"
                       OglModel,
                       RigidMapping
                    }
                }
    """
    #### mechanics
    object = node.createChild(name)

    if not isAStaticObject:
        object.createObject('EulerImplicitSolver', name='odesolver')
        object.createObject('CGLinearSolver', name='Solver')

    object.createObject('MechanicalObject',
                      name="mstate", template="Rigid3",
                      translation2=translation, rotation2=rotation, showObjectScale=uniformScale)

    object.createObject('UniformMass', name="mass", vertexMass=[totalMass, volume, inertiaMatrix[:]])

    if not isAStaticObject:
        object.createObject('UncoupledConstraintCorrection')

    #### collision
    objectCollis = object.createChild('collision')
    objectCollis.createObject('MeshObjLoader', name="loader", filename=surfaceMeshFileName, triangulate="true",
                            scale=uniformScale)

    objectCollis.createObject('MeshTopology', src="@loader")
    objectCollis.createObject('MechanicalObject')

    if isAStaticObject:
        objectCollis.createObject('TriangleCollisionModel', moving=False, simulated=False)
        objectCollis.createObject('LineCollisionModel', moving=False, simulated=False)
        objectCollis.createObject('PointCollisionModel', moving=False, simulated=False)
    else:
        objectCollis.createObject('TriangleCollisionModel')
        objectCollis.createObject('LineCollisionModel')
        objectCollis.createObject('PointCollisionModel')

    objectCollis.createObject('RigidMapping')

    #### visualization
    objectVisu = VisualModel(parent=object, surfaceMeshFileName=surfaceMeshFileName, color=color, scale=[uniformScale]*3)
    objectVisu.createObject('RigidMapping')

    return object

def createScene(rootNode):
    from stlib.scene import MainHeader
    from stlib.solver import DefaultSolver

    MainHeader(rootNode)
    DefaultSolver(rootNode)
    RigidObject(rootNode, surfaceMeshFileName="mesh/smCube27.obj", name="Left", translation=[-20., 0., 0.])
    RigidObject(rootNode, surfaceMeshFileName="mesh/dragon.obj", translation=[0., 0., 0.])
    RigidObject(rootNode, surfaceMeshFileName="mesh/smCube27.obj", name="Right", translation=[ 20., 0., 0.])
