# -*- coding: utf-8 -*-
"""

This package is focused on implementing a standard rigid object for sofa. The object is
made described by its surface mesh.

**Content:**

.. autosummary::

    RigidObject
    Cube
    Sphere
    Floor


stlib.physics.rigid.RigidObject
*******************************
.. autofunction:: RigidObject

stlib.physics.rigid.Cube
************************
.. autofunction:: Cube

stlib.physics.rigid.Sphere
**************************
.. autofunction:: Sphere

stlib.physics.rigid.Floor
*************************
.. autofunction:: Floor


"""
all = ["rigidobject"]
from stlib.physics.rigid.rigidobject import RigidObject

def Cube(node, **kwargs):
    """Create a rigid cube of unit dimension"""
    if "name" not in kwargs:
        kwargs["name"] = "Cube"
    return RigidObject(node, surfaceMeshFileName="mesh/cube.obj", **kwargs)

def Sphere(node, **kwargs):
    """Create a rigid sphere of unit dimension"""
    if "name" not in kwargs:
        kwargs["name"] = "Sphere"
    return RigidObject(node, surfaceMeshFileName="mesh/ball.obj", **kwargs)

def Floor(node, **kwargs):
    """Create a rigid floor of unit dimension"""
    if "name" not in kwargs:
        kwargs["name"] = "Floor"
        print("ADDING A NAME", kwargs)
    return node.addChild( RigidObject(surfaceMeshFileName="mesh/floor.obj", **kwargs) )

def createScene(rootNode):
    from stlib.scene import MainHeader
    from stlib.solver import DefaultSolver

    MainHeader(rootNode)
    DefaultSolver(rootNode)
    Cube(rootNode, translation=[5.0,0.0,0.0])
    Sphere(rootNode, translation=[-5.0,0.0,0.0])
    Floor(rootNode, translation=[0.0,-1.0,0.0])
